*Heading
** Job name: Smooth_CAX Model name: Smooth-30mm
** Generated by: Abaqus/CAE 2022
*Preprint, echo=NO, model=NO, history=NO, contact=NO
**
** PARTS
**
*Part, name=Part-1
*Node
      1,          2.5,           4.
      2,   2.30769229,           4.
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*Element, type=CAX4R
  1,   1,   2,  16,  15
  2,   2,   3,  17,  16
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*Nset, nset=_PickedSet50, internal, generate
   1,  856,    1
*Elset, elset=_PickedSet50, internal, generate
   1,  779,    1
*Nset, nset=MasterNode
 857,
*Nset, nset=Lower, generate
 281,  294,    1
*Elset, elset=Lowerels, generate
 248,  260,    1
*Elset, elset=Surfaceels, generate
 222,  248,   13
*Nset, nset=Sym
  14,  28,  42,  56,  70,  84
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*Nset, nset=Upper
 678, 683, 686, 693, 716, 717
*Nset, nset=Diameter
 281,
** Section: Section-1
*Solid Section, elset=_PickedSet50, controls=EC-1, material=Durable
,
*End Part
**
**
** ASSEMBLY
**
*Assembly, name=Assembly
**
*Instance, name=Part-1-1, part=Part-1
*End Instance
**
*Nset, nset=_PickedSet5, internal, instance=Part-1-1, generate
 281,  294,    1
*Elset, elset=_PickedSet5, internal, instance=Part-1-1, generate
 248,  260,    1
** Constraint: Constraint-1
*Equation
2
Part-1-1.Upper, 2, 1.
Part-1-1.MasterNode, 2, -1.
*End Assembly
**
** ELEMENT CONTROLS
**
*Section Controls, name=EC-1, hourglass=COMBINED
1., 1., 1.
*Amplitude, name=Amp-1, definition=SMOOTH STEP
             0.,              0.,             20.,              1.,            200.,              1.
**
** MATERIALS
**
*Include, input=Durable.inc
**
** BOUNDARY CONDITIONS
**
** Name: Sym Type: Displacement/Rotation
*Boundary
Part-1-1.Sym, 1, 1
Part-1-1.Sym, 6, 6
** Name: yfix Type: Displacement/Rotation
*Boundary
_PickedSet5, 2, 2
** ----------------------------------------------------------------
**
** STEP: Step-1
**
*Step, name=Step-1, nlgeom=YES
*Dynamic, Explicit
, 200.
*Bulk Viscosity
0.06, 1.2
**
** BOUNDARY CONDITIONS
**
** Name: topVelocity Type: Velocity/Angular velocity
*Boundary, amplitude=Amp-1, type=VELOCITY
Part-1-1.MasterNode, 2, 2, 0.025
**
** OUTPUT REQUESTS
**
*Restart, write, number interval=1, time marks=NO
**
** FIELD OUTPUT: F-Output-1
**
*Output, field, number interval=100
*Node Output
A, U, V
*Element Output, directions=YES
LE, S, SDV
**
** HISTORY OUTPUT: H-Output-1
** HISTORY OUTPUT: H-Output-3
**
*Output, history
*Node Output, nset=Part-1-1.Diameter
U1,
**
**
** HISTORY OUTPUT: H-Output-2
**
*Node Output, nset=Part-1-1.MasterNode
RF2, U2
**
*Output, history, variable=PRESELECT, time interval=1.
*End Step
